# ----------------------------------------
#     test_evo.run
# ----------------------------------------
#
# Simulations END to END: 1000 particules de diamètre de d = 4.8 cm et pouvant aller
# à une vitesse 12cm/s = 2.5d/s vivent dans un arene de diamètre 590cm ou une zone
# lumineuse de diamètre 145cm est placée au centre. l'échelle caractéristique de temps est
# tau = 1/2.5  = 0.4s soit 2.5tau = 1s et 18000 tau = 7200s = 2h
# Expérimentalement, le temps d'intégration est T = 62.5 s soit T = 156 tau. or alphaq = ln(100)/T = 0.03.
# On peut essayer différentes valeurs pour DP
#
#of columns changed from 14 to 2 at row

# ------------------------------------------
# PARAMETRES
# ------------------------------------------

variable    d equal 1 # Taille des particules
variable	N equal 64 # nombres de particules
variable 	l equal 4.15 # rayon de la zone lumineuse
variable    L equal 15
variable    c equal 8
variable	runtime_Main equal 18000000	# 2heures en temps de simulations
variable	dump_freq equal 2500	# on récupère les données toutes les secondes
variable	dt equal 0.001
variable    num_controller equal 4

variable    comm_radius2 equal 1.25
variable    alpha equal 1000.0

variable    gamma_t equal 1.0
variable    gamma_r equal 1.0
variable    Dt equal 0.0


variable    Nn equal 8

# --------------------------------------------
# DÉFINITION DES DIFFÉRENTES RÉGIONS:
# BOITE DE SIMU, ZONE INITIALE, ZONE LUMINEUSE
# --------------------------------------------


# boite carrée, lumière=cylindre
region          full_box block -$L $L -$L $L -0.2 0.2 units box
region          light cylinder z 0.0 0.0 $l -10 10 units box


#si on veut départ dans l'ombre
region          init1 block -$L -$c -$L $L -0.2 0.2
region          init2 block $c $L -$L $L -0.2 0.2
region          init3 block -$L $L -$L -$c -0.2 0.2
region          init4 block -$L $L $c $L -0.2 0.2
region          init union 4 init1 init2 init3 init4


variable	    WCA_cut equal 1.122
variable 	    runtime_Soft equal 50000

# ----------------------------------
# UNITES, DIMENSION, ATOME ET BOITE
# ---------------------------------

units           lj
dimension       3
boundary        p p p
atom_style      hybrid sphere polar2D learner sap
create_box      1 full_box
timestep        ${dt}

# -----------------------------------------------------------------------------
# PERFORM A SHORT BROWNIAN MOTION WITH A REPULSIVE POTENTIAL GRADUALLY
# INCREASING FROM ZERO THIS STEP IS MADE TO REMOVE OVERLAPS BEFORE THE MAIN RUN
# -----------------------------------------------------------------------------

#set up equilibration run: add particles randomly to box with soft potential.
pair_style      soft ${WCA_cut}
pair_coeff      * * 0.0
variable        prefactor equal ramp(0,100) # strength of soft potential is increase slowly over time
create_atoms	1 random ${N} ${Seed} full_box # adding N particles randomly to the entire simulation box
set             type * diameter 1.0

fix             1 all brownian 0.0001 ${Seed} gamma_t 1.0 #run a passive brownian to remove overlaps
fix             2 all adapt 1 pair soft a * * v_prefactor
thermo		    10000
run             ${runtime_Soft}
unfix		    1
unfix           2


reset_timestep	0

# -----------------------------------------------------------------------------
# MAIN RUN: ACTIVE BROWNIAN PARTICLES LEARNING TO PERFORM PHOTOTAXIS
# -----------------------------------------------------------------------------

# Set up main run: change particle interactions to  WCA.
pair_style	    lj/cut ${WCA_cut}
pair_modify	    shift yes #shifts LJ to become WCA
pair_coeff	    * * 1 1.0 ${WCA_cut}  #Cutoff LJ at minima to become WCA

fix             1 all robot_learning ${alphaq} ${Dp} light light ${comm_radius2} ${alpha} ${Nn} ${Seed}
fix             2 all controler ${num_controller}
fix             3 all self_alignment
fix             4 all SelfBrownian2D ${gamma_t} ${gamma_r} ${Dt}  ${Seed}


compute         cNN all poidsnn/atom ${Nn}

dump            dNN all custom ${dump_freq} dumpnn_${Dp}_${alphaq}_${Seed}.txt id c_cNN[*] x y vx vy
dump_modify     dNN sort id
run             ${runtime_Main}
