# ----------------------------------------
#     test_learning_phototaxis.in
# ----------------------------------------


# ------------------------------------------
# PARAMETRES
# ------------------------------------------

# set the random seed:
variable Seed index 25389

# set the number of particles:
variable    N equal 2
variable c equal 0
# Set the size of the bos, and light diameter:
variable    L equal 3
variable    l equal 0.5


# set the time step, the total number of steps, and the frequency of dumping data:
variable	dt equal 0.001
variable    runtime_Main equal 1000000
variable    dump_freq equal 1


# set the controler:
variable    num_controller equal 4

#set the "size" of the neural network:
variable    Nn equal 8
variable    h equal 0 # in case of MLP, sets the thickness of the hidden layer

# set the learning parameters:
variable    comm_radius equal 1.122

variable    alphaq equal 0.03
variable    alpha equal 1000.0
variable    Dp equal 1e-05

# set the physical parameters related to friction and noise:
variable    gamma_t equal 1.0
variable    gamma_r equal 1.0

variable    Dt equal 0.0
variable    Dr equal 0.0
variable    zeta equal 0.0


# --------------------------------------------
# DÉFINITION DES DIFFÉRENTES RÉGIONS:
# BOITE DE SIMU, ZONE INITIALE, ZONE LUMINEUSE
# --------------------------------------------
# boite carrée, lumière=cylindre
region          full_box block -$L $L -$L $L -0.2 0.2 units box
region          light cylinder z 0.0 0.0 $l -10 10 units box

#si on veut départ dans l'ombre
region          init1 block -$L -$c -$L $L -0.2 0.2
region          init2 block $c $L -$L $L -0.2 0.2
region          init3 block -$L $L -$L -$c -0.2 0.2
region          init4 block -$L $L $c $L -0.2 0.2
region          init union 4 init1 init2 init3 init4


# ----------------------------------
# UNITES, DIMENSION, ATOME ET BOITE
# ---------------------------------

units           lj
dimension       3
boundary        p p p
atom_style      hybrid sphere polar2D learner sap
create_box      1 full_box
timestep        ${dt}
variable	    WCA_cut equal 1.122


# -----------------------------------------------------------------------------
# PERFORM A SHORT BROWNIAN MOTION WITH A REPULSIVE POTENTIAL GRADUALLY
# INCREASING FROM ZERO THIS STEP IS MADE TO REMOVE OVERLAPS BEFORE THE MAIN RUN
# -----------------------------------------------------------------------------

create_atoms 1 single 0.0 0.0 0.0
create_atoms 1 single 2.0 0.0 0.0
create_atoms 1 single -0.8 0.0 0.0

#group atom1 id 1
#group atom2 id 2


#velocity atom1 set 0.0 0.0 0.0
#velocity atom2 set 1.0 0.0 0.0

set             type * diameter 1.0
neighbor 0.3 bin
comm_modify cutoff 1.5

fix              1 all robot_force_learning ${alphaq} ${Dp} light light ${comm_radius} ${alpha} ${Nn} ${Seed} 0
fix              2 all controler ${num_controller} ${Nn} ${h}
fix              3 all self_alignment ${zeta}
fix              4 all SelfBrownian2D ${gamma_t} ${gamma_r} ${Dt} ${Dr} ${Seed}
fix              5 all IntegrationLearning ${Dp} ${Nn} ${Seed}

compute         cNN all poidsnn/atom ${Nn}

dump            dNN all custom ${dump_freq} dumpnn_${num_controller}_${Dp}_${alphaq}_${Dr}_${Seed}.txt id c_cNN[*] x y vx vy
dump_modify     dNN sort id
run             ${runtime_Main}
